<neuroml xmlns="http://www.neuroml.org/schema/neuroml2"  xmlns:xs="http://www.w3.org/2001/XMLSchema" xmlns:xsi="http://www.w3.org/2001/XMLSchema-instance" xsi:schemaLocation="http://www.neuroml.org/schema/neuroml2 https://raw.github.com/NeuroML/NeuroML2/development/Schemas/NeuroML2/NeuroML_v2beta5.xsd" id="IClamp_PV">
    <notes>Generated network: IClamp_PV
    NeuroMLlite parameters:
        stim_amp = 1.25pA</notes>
    <include href="WangBuzsaki.cell.nml"/>
    <pulseGenerator id="iclamp_0" delay="0ms" duration="3000ms" amplitude="1.25pA"/>
    <network id="IClamp_PV" type="networkWithTemperature" temperature="37.0degC">
        <notes>A simple network: IClamp_PV.</notes>
        <population id="pop_PV" component="PV" size="1" type="populationList">
            <property tag="region" value="region1"/>
            <instance id="0">
                <location x="966.453535692138757" y="44.073259917535268" z="7.491470058587191"/>
            </instance>
        </population>
        <inputList id="Stim0" population="pop_PV" component="iclamp_0">
            <input id="0" target="../pop_PV/0/PV" destination="synapses"/>
        </inputList>
    </network>
</neuroml>
